*Heading
 Modified Lithium/LLZO model with quadratic CPE8H elements and contact friction 0.1, pressure 5.0
** Job name: final_v2_p5 Model name: Lithium_Model_p5
** Generated by: Abaqus/CAE 2017
*Preprint, echo=NO, model=NO, history=NO, contact=NO
**
** PARTS
**
*Part, name=LITHIUM_PART
*Node
      1,           0.,          5.5
      2,          20.,          5.5
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*Element, type=CPE8
   1,    1,    7,  370,  252, 3637, 3638, 3639, 3640
   2,    7,    8,  371,  370, 3641, 3642, 3643, 3638
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*Nset, nset=_PickedSet3, internal
     1,     2,     5,     6,     7,     8
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*Elset, elset=_PickedSet3, internal, generate
 2501,  3500,     1
*Nset, nset=_PickedSet4, internal
    1,    2,    3,    4,    7,    8
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*Elset, elset=_PickedSet4, internal, generate
    1,  2500,     1
** Section: SEC_LITHIUM
*Solid Section, elset=_PickedSet4, material=LITHIUM_SUB
,
** Section: SEC_SEED
*Solid Section, elset=_PickedSet3, material=LITHIUM_IP
,
*End Part
**
*Part, name=LLZO_PART
*Node
      1,           0.,           0.
      2,  0.200000003,           0.
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*Element, type=CPE8
   1,    1,    2,  103,  102, 2627, 2628, 2629, 2630
   2,    2,    3,  104,  103, 2631, 2632, 2633, 2628
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*Nset, nset=_PickedSet2, internal, generate
    1,  7751,     1
*Elset, elset=_PickedSet2, internal, generate
    1,  2500,     1
** Section: SEC_LLZO
*Solid Section, elset=_PickedSet2, material=LLZO
,
*End Part
**
**
** ASSEMBLY
**
*Assembly, name=Assembly
**
*Instance, name=LLZO_INST, part=LLZO_PART
*End Instance
**
*Instance, name=LITHIUM_INST, part=LITHIUM_PART
*End Instance
**
*Nset, nset=BOTTOM, instance=LLZO_INST
    1,    2,    3,    4,    5,    6
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*Elset, elset=BOTTOM, instance=LLZO_INST, generate
   1,  100,    1
*Nset, nset=LEFT, instance=LLZO_INST
    1,  102,  203,  304,  405,  506
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*Nset, nset=LEFT, instance=LITHIUM_INST
     1,     4,     5,   229,   230,   231
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*Elset, elset=LEFT, instance=LLZO_INST, generate
    1,  2401,   100
*Elset, elset=LEFT, instance=LITHIUM_INST
    1,  101,  201,  301,  401,  501
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*Nset, nset=LITHIUM_NODES_SET, instance=LITHIUM_INST, generate
     1,  10771,      1
*Elset, elset=LITHIUM_NODES_SET, instance=LITHIUM_INST, generate
    1,  3500,     1
*Nset, nset=RIGHT, instance=LLZO_INST
  101,  202,  303,  404,  505,  606
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*Nset, nset=RIGHT, instance=LITHIUM_INST
     2,     3,     6,   106,   107,   108
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*Elset, elset=RIGHT, instance=LLZO_INST, generate
  100,  2500,   100
*Elset, elset=RIGHT, instance=LITHIUM_INST
  100,  200,  300,  400,  500,  600
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*Elset, elset=_LITHIUM_BOT_SURF_S3, internal, instance=LITHIUM_INST, generate
 3401,  3500,     1
*Surface, type=ELEMENT, name=LITHIUM_BOT_SURF
_LITHIUM_BOT_SURF_S3, S3
*Elset, elset=_LLZO_TOP_SURF_S3, internal, instance=LLZO_INST, generate
 2401,  2500,     1
*Surface, type=ELEMENT, name=LLZO_TOP_SURF
_LLZO_TOP_SURF_S3, S3
*Elset, elset=_TOP_SURFACE_S3, internal, instance=LITHIUM_INST, generate
 2401,  2500,     1
*Surface, type=ELEMENT, name=TOP_SURFACE
_TOP_SURFACE_S3, S3
*End Assembly
**
** MATERIALS
**
*Material, name=LITHIUM_IP
*Density
 5.34e-10,
*Depvar
     24,
*User Material, constants=16
7810.,    0.38, 4.254e4,     37.,    298.,   0.15,   0.95,     10.
     2.,      2.,    0.05, 1.3e-05,      0.,      1.,      0., 103.643
*Material, name=LITHIUM_SUB
*Density
 5.34e-10,
*Depvar
     24,
*User Material, constants=16
7810.,    0.38, 4.254e4,     37.,    298.,   0.15,   0.95,     10.
     2.,      2.,    0.05, 1.3e-05,      0.,      1.,      0.,      0.
*Material, name=LLZO
*Density
 5.1e-09,
*Elastic
150000., 0.25
**
** INTERACTION PROPERTIES
**
*Surface Interaction, name=IntProp-1
1.,
*Friction, slip tolerance=0.005
 0.1,
*Surface Behavior, penalty
**
** BOUNDARY CONDITIONS
**
** Name: BC_BOT Type: Displacement/Rotation
*Boundary
BOTTOM, 1, 1
BOTTOM, 2, 2
** Name: BC_LEFT Type: Displacement/Rotation
*Boundary
LEFT, 1, 1
** Name: BC_RIGHT Type: Displacement/Rotation
*Boundary
RIGHT, 1, 1
**
** PREDEFINED FIELDS
**
** Name: Predef_Temp   Type: Temperature
*Initial Conditions, type=TEMPERATURE
LITHIUM_NODES_SET, 0.
**
** INTERACTIONS
**
** Interaction: Int-1
*Contact Pair, interaction=IntProp-1, small sliding, type=SURFACE TO SURFACE
LITHIUM_BOT_SURF, LLZO_TOP_SURF
** ----------------------------------------------------------------
**
** STEP: Step-1
**
*Step, name=Step-1, nlgeom=YES, amplitude=STEP, inc=100000
*Dynamic,application=QUASI-STATIC,nohaf
0.001,12960.,1e-15,1.
*CONTROLS, ANALYSIS=DISCONTINUOUS
*CONTROLS, PARAMETERS=TIME INCREMENTATION
,,,,,,,30,,,,,,
*CONTROLS, PARAMETERS=FIELD
0.05, 2.0
*CONTROLS, PARAMETERS=FIELD, FIELD=DISPLACEMENT
0.02, 2.0
**
** LOADS
**
** Name: Load-1   Type: Pressure
*Dsload
TOP_SURFACE, P, 5.
**
** OUTPUT REQUESTS
**
*Restart, write, frequency=0
**
** FIELD OUTPUT: F-Output-1
**
*Output, field
*Node Output
NT, RF, U
*Element Output, directions=YES
LE, S, SDV, STATUS
**
** HISTORY OUTPUT: H-Output-1
**
*Output, history, variable=PRESELECT
*End Step
