*Heading
** Job name: final_v3 Model name: Lithium_Model
** Generated by: Abaqus/CAE 2017
*Preprint, echo=NO, model=NO, history=NO, contact=NO
**
** PARTS
**
*Part, name=LITHIUM_SE
*End Part
**
**
** ASSEMBLY
**
*Assembly, name=Assembly
**
*Instance, name=LITHIUM_INST, part=LITHIUM_SE
*Node
      1,          12.,          5.5
      2,          12.,           5.
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*Element, type=CPE4H
  1,   1,  13, 537,  98
  2,  13,  14, 538, 537
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*Nset, nset=_PickedSet4, internal
    2,    3,    5,    8,   11,   12
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*Elset, elset=_PickedSet4, internal, generate
 1801,  3000,     1
*Nset, nset=_PickedSet5, internal
    1,    2,    3,    4,    5,    6
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*Elset, elset=_PickedSet5, internal
    1,    2,    3,    4,    5,    6
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*Nset, nset=_PickedSet6, internal
    1,    4,    6,    7,    9,   10
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*Elset, elset=_PickedSet6, internal, generate
  401,  1600,     1
** Section: SEC_SEED
*Solid Section, elset=_PickedSet5, material=LITHIUM_IP
,
** Section: SEC_LITHIUM
*Solid Section, elset=_PickedSet6, material=LITHIUM_SUB
,
** Section: SEC_LLZO
*Solid Section, elset=_PickedSet4, material=LLZO
,
*End Instance
**
*Nset, nset=BOTTOM, instance=LITHIUM_INST
  11,  12, 409, 410, 411, 412
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*Elset, elset=BOTTOM, instance=LITHIUM_INST, generate
 2881,  3000,     1
*Nset, nset=LEFT, instance=LITHIUM_INST
   7,   8,  10,  11, 142, 143
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*Elset, elset=LEFT, instance=LITHIUM_INST
  396,  397,  398,  399,  400, 1591
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*Nset, nset=RIGHT, instance=LITHIUM_INST
   3,   4,   9,  12,  56,  57
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*Elset, elset=RIGHT, instance=LITHIUM_INST
  196,  197,  198,  199,  200,  401
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*Nset, nset=TOP_NODES, instance=LITHIUM_INST
   9,  10, 194, 195, 196, 197
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*Elset, elset=TOP_NODES, instance=LITHIUM_INST, generate
  410,  1600,    10
*Elset, elset=_TOP_SURFACE_S2, internal, instance=LITHIUM_INST, generate
  410,  1600,    10
*Surface, type=ELEMENT, name=TOP_SURFACE
_TOP_SURFACE_S2, S2
*End Assembly
**
** MATERIALS
**
*Material, name=LITHIUM_IP
*Depvar
     24,
*User Material, constants=16
7810.,    0.38, 4.254e4,     37.,    298.,   0.15,   0.95,     10.
     2.,      2.,    0.05, 1.3e-05,      0.,      1.,      0., 103.643
*Material, name=LITHIUM_SUB
*Depvar
     24,
*User Material, constants=16
7810.,    0.38, 4.254e4,     37.,    298.,   0.15,   0.95,     10.
     2.,      2.,    0.05, 1.3e-05,      0.,      1.,      0.,      0.
*Material, name=LLZO
*Elastic
150000., 0.25
**
** BOUNDARY CONDITIONS
**
** Name: BC_BOT Type: Displacement/Rotation
*Boundary
BOTTOM, 1, 1
BOTTOM, 2, 2
** Name: BC_LEFT Type: Displacement/Rotation
*Boundary
LEFT, 1, 1
** Name: BC_RIGHT Type: Displacement/Rotation
*Boundary
RIGHT, 1, 1
** ----------------------------------------------------------------
**
** STEP: Step-1
**
*Step, name=Step-1, nlgeom=YES, inc=100000
*Static, stabilize, factor=0.002, allsdtol=0, continue=NO
0.001, 21600., 1e-07, 1.
**
** LOADS
**
** Name: Load-1   Type: Pressure
*Dsload
TOP_SURFACE, P, 0.1
**
** OUTPUT REQUESTS
**
*Restart, write, frequency=0
**
** FIELD OUTPUT: F-Output-1
**
*Output, field
*Node Output
NT, RF, U
*Element Output, directions=YES
LE, S, SDV, STATUS
**
** HISTORY OUTPUT: H-Output-1
**
*Output, history, variable=PRESELECT
*End Step
